// COMSOL Multiphysics 6.3.0.335 model "cantilever_linear_nonlinear_graph.mph"
// Outline of the model tree

Parameters
  L = 100[mm]
  b = 30[mm]
  t = 1[mm]
  disp_step = 0
  EM = 200[GPa]
  PR = 0.3
  d_s = 7860[kg/m^3]
  I = (b*t^3)/12
  EI = EM * I
  A = b * t

Geometry
  geom1 "Geometry 1" (2D, length unit mm)
    ls1: LineSegment | specify1 = coord; specify2 = coord; coord2 = {L, 0}
    fin: Finalize "Form Union"

Materials
  mat1: Common "Material 1" on all boundaries
    def: def "Basic"
      density = d_s
    Enu: Enu "Young's modulus and Poisson's ratio"
      E = EM
      nu = PR

Physics
  beam: HermitianBeam on all boundaries
    dependent variable u = {u, v, w}
    emm1: Elastic "Linear Elastic Material 1" (default)
    csd1: CrossSectionBeam "Cross-Section Data 1" (default) | SectionType = RectangularSection; hy_rect = t; hz_rect = b
    free1: Free (default)
    init1: init "Initial Values 1" (default)
    fix1: Fixed "Fixed Constraint 1" on points 1
    pdr1: DispRot0 "Prescribed Displacement/Rotation 1" on points 2
      Direction = {free, prescribed, free}
      U0 = {0, disp_step, 0}

Mesh
  mesh1 "Mesh 1"
    size: MeshSizeDefault | hauto = 3; custom = on; hmax = 1
    edg1: Edge on boundaries 1 | smoothmaxiter = 4; smoothmaxdepth = 4

Studies
  std1 "Study 1"
    stat: Stationary
      geometricNonlinearity = on
      useparam = on
      sweeptype = filled
      pname = disp_step
      plistarr = range(0.1, 1, 80)
      punit = mm
  std2 "Study 2"
    stat: Stationary | useparam = on; pname = disp_step; plistarr = range(0.1, 1, 80); punit = mm

Solver configurations
  sol1 "Solution 1" (study std1)
    v1: Variables "Dependent Variables 1"
    s1: Stationary "Stationary Solver 1"
      dDef: Direct
      p1: Parametric
      fc1: FullyCoupled
  sol2 "Solution 2" (study std2)
    // same settings as sol1

Datasets
  dset1: Solution | solution = sol1
  dset2: Solution | solution = sol2

Derived values
  pev1: EvalPoint "Point Evaluation 1" on points 2 | data = dset1; expr = beam.RFy

Plots
  pg1: PlotGroup2D "Stress (beam)" | data = dset1
    line1: Line | expr = beam.mises; linetype = tube; radiusexpr = beam.re
      def: Deform "Deformation" | expr = {u, v}; descr = Displacement field
  pg2: PlotGroup1D "1D Plot Group 2" | data = dset1
    ptgr1: PointGraph on points 2
      data = dset1
      expr = (abs(beam.RFy) * (L)^2) /(EI)
      unit = m^3/s^3
      xdata = expr
      xdataexpr = disp_step/L
  pg3: PlotGroup2D "Stress (beam) 1" | data = dset2
    line1: Line | expr = beam.mises; linetype = tube; radiusexpr = beam.re
      def: Deform "Deformation" | expr = {u, v}; descr = Displacement field
  pg4: PlotGroup1D "1D Plot Group 4" | data = dset1
    ptgr1: PointGraph on points 2
      data = dset2
      expr = (abs(beam.RFy) * (L)^2) /(EI)
      xdata = expr
      xdataexpr = disp_step/L